<!DOCTYPE autopilot SYSTEM "autopilot.dtd">

<autopilot name="Steering Rover Autopilot">

  <state_machine name="ap" freq="PERIODIC_FREQUENCY" gcs_mode="true" settings_mode="true">

    <includes>
      <include name="generated/airframe.h"/>
      <include name="autopilot.h"/>
      <include name="autopilot_rc_helpers.h"/>
      <include name="modules/gps/gps.h"/>
      <include name="modules/actuators/actuators.h"/>
      <include name="modules/radio_control/radio_control.h"/>
      <include name="modules/guidance/gvf_common.h"/>
      <include name="navigation.h"/>
      <include name="state.h"/>
      <define  name="RCLost()" value="(radio_control.status == RC_REALLY_LOST)"/>
    </includes>

    <settings>
      <dl_setting var="autopilot.kill_throttle" min="0" step="1" max="1" module="autopilot" values="Resurrect|Kill" handler="KillThrottle"/>
    </settings>

    <exceptions>
      <exception cond="nav.too_far_from_home" deroute="HOME"/>
      <exception cond="kill_switch_is_on()"   deroute="KILL"/>
    </exceptions>

    <!-- * AP MODES * ......................................................................... -->
    <!-- RC Manual -->
    <mode name="DIRECT" shortname="MANUAL">
      <select cond="RCMode0()"/>
      <on_enter>
        <call fun="rover_guidance_steering_pid_reset()"/>
      </on_enter>
      <control freq="NAVIGATION_FREQUENCY"> <!-- Only for display -->
        <call fun="nav_periodic_task()"/>
      </control>
      <control>
        <call fun="SetCommandsFromRC(commands, radio_control.values)"/>
        <call fun="SetActuatorsFromCommands(commands, autopilot_get_mode())"/>

        <call fun="SetAPThrottleFromCommands(commands[COMMAND_THROTTLE])"/>
      </control>
      <exception cond="RCLost()" deroute="AKILL"/>
    </mode>

    <!-- Cruiser: Speed ctrl (from state speed on enter )+ Heading from RC -->
    <mode name="CRUISER" shortname="AUTO1">
      <select cond="RCMode1()"/>
      <on_enter>
        <call fun="guidance_control.cmd.speed = stateGetHorizontalSpeedNorm_f()"/>
      </on_enter>
      <control freq="NAVIGATION_FREQUENCY">
        <call fun="nav_periodic_task()"/>
      </control>
      <control>
        <call fun="rover_guidance_steering_speed_ctrl()"/>
        <call fun="SetCommandsFromRC(commands, radio_control.values)"/>

        <call fun="commands[COMMAND_THROTTLE] = GetCmdFromThrottle(guidance_control.throttle);"/>
        <call fun="SetActuatorsFromCommands(commands, autopilot_get_mode())"/>

        <call fun="SetAPThrottleFromCommands()"/>
      </control>
      <exception cond="RCLost()" deroute="KILL"/>
    </mode>

    <!-- Navigation: Speed crtl (from state speed on enter) + heading ctrl (from GCS & flight plans) -->
    <mode name="NAV">
      <select cond="$DEFAULT_MODE"/>
      <select cond="RCMode2()" exception="HOME"/>
      <on_enter>
        <call fun="guidance_control.cmd.speed = stateGetHorizontalSpeedNorm_f()"/>
      </on_enter>
      <control freq="NAVIGATION_FREQUENCY">
        <call fun="nav_periodic_task()"/>
      </control>
      <control>
        <call fun="rover_guidance_steering_speed_ctrl()"/>
        <call fun="rover_guidance_steering_heading_ctrl(gvf_c_omega.omega)"/>

        <call fun="commands[COMMAND_STEERING] = GetCmdFromDelta(guidance_control.cmd.delta);"/>
        <call fun="commands[COMMAND_THROTTLE] = GetCmdFromThrottle(guidance_control.throttle);"/>
        <call fun="SetActuatorsFromCommands(commands, autopilot_get_mode())"/>

        <call fun="SetAPThrottleFromCommands()"/>
      </control>
      <exception cond="GpsIsLost() && autopilot_in_flight()" deroute="KILL"/>
    </mode>

    <!-- HOME (not yet implemented) -->
    <mode name="HOME">
      <control freq="NAVIGATION_FREQUENCY">
        <call fun="nav_home()"/>
      </control>
      <control>
        <call fun="SetActuatorsFromCommands(commands, autopilot_get_mode())"/>

        <call fun="SetAPThrottleFromCommands()"/>
      </control>
      <exception cond="GpsIsLost()" deroute="KILL"/>
    </mode>

    <!-- Kill throttle -->
    <mode name="KILL">
      <select cond="kill_switch_is_on()"/>
      <on_enter>
        <call fun="autopilot_set_in_flight(false)"/>
        <call fun="autopilot_set_motors_on(false)"/>
      </on_enter>
      <control>
        <call fun="rover_guidance_steering_kill()"/>

        <call fun="SetCommands(commands_failsafe)"/>
        <call fun="SetAPThrottleFromCommands()"/>
      </control>
    </mode>

       <!-- Almost Kill throttle -->
    <mode name="AKILL">
      <select cond="kill_switch_is_on()"/>
      <on_enter>
        <!--call fun="autopilot_set_in_flight(false)"/-->
        <call fun="autopilot_set_motors_on(false)"/>
      </on_enter>
      <control>
        <!--call fun="rover_guidance_steering_kill()"/-->

        <!--call fun="SetCommands(commands_failsafe)"/-->
        <!--call fun="SetAPThrottleFromCommands()"/-->
      </control>
       <exception cond="LessThan(RCLost(),1)" deroute="DIRECT"/>
    </mode>

  </state_machine>

</autopilot>
